Wh := 500
fo := 2.4*10^9
c := 299792458
λo := c/fo = 0.124914
Zo := 120*π
λcrit := λo/sqrt(1 - (Zo/Wh)^2) = 0.190158
a := λcrit/2 = 0.0950788
λв := λo/sqrt(1 - (λo/λcrit)^2) = 0.165672
b := a/2 = 0.0475394
